// COMSOL Multiphysics 6.2.0.290 model "GasCT_COMSOL62_Coarse_Model.mph"
// Outline of the model tree

Parameters
  Un = 500[kV]  // Nominal system voltage
  Uhv = Un/sqrt(3)*sqrt(2)  // Phase-to-ground peak voltage
  r_hv = 70[mm]  // Equivalent outer radius of HV electrode
  d = 120[mm]  // Main insulation radial gap
  H = 500[mm]  // Axial model height
  r_m = 120[mm]  // Intermediate-electrode inner radius
  t_m = 4[mm]  // Intermediate-electrode radial thickness
  l_m = 60[mm]  // Intermediate-electrode axial length
  h_m = 0.52  // Normalized intermediate-electrode center position
  z_m = h_m*H-l_m/2  // Intermediate-electrode lower axial position
  epsr_gas = 1.0006  // Representative relative permittivity of N2/O2/He gas

Selections
  gasdom: Explicit "Gas domain" on domains 1
  hv: Explicit "High-voltage electrode surface" on boundaries 1
  gnd: Explicit "Grounded enclosure inner wall" on boundaries 8
  floating: Explicit "Floating intermediate electrode surface" on boundaries 4-7

Geometry
  geom1 "几何 1" (2D axisymmetric, length unit mm)
    gas: Rectangle "Gas chamber cross-section" | pos = {r_hv, 0}; size = {d, H}
    ie: Rectangle "Intermediate electrode cross-section" | pos = {r_m, z_m}; size = {t_m, l_m}
    fin: Finalize "形成联合体"

Materials
  mat1: Common "N2 O2 He representative dielectric" on selection gasdom
    def "基本"
      relpermittivity = epsr_gas

Physics
  es: Electrostatics on selection gasdom
    dependent variable V
    ccn1: ChargeConservation "电荷守恒 1" (default)
    axi1: AxialSymmetry "轴对称 1" (default)
    zc1: ZeroCharge "零电荷 1" (default)
    init1: init "初始值 1" (default)
    pot1: ElectricPotential "408.248 kV phase-to-ground peak" on selection hv | V0 = Uhv
    gnd1: Ground "接地 1" on selection gnd
    fp1: FloatingPotential "Zero-net-charge floating electrode" on selection floating | Q0 = 0[C]

Mesh
  mesh1 "GasCT_COMSOL62_Coarse triangular mesh" (physics-controlled)
    size: MeshSizeDefault "大小" | hauto = 7

Studies
  std1 "Stationary Electrostatics"
    stat: Stationary "稳态"

Solver configurations
  sol1 "解 1" (study std1)
    v1: Variables "因变量 1"
    s1: Stationary "稳态求解器 1"
      dDef: Direct "直接"
      fc1: FullyCoupled "全耦合 1"

Datasets
  dset1: Solution | solution = sol1

Derived values
  max1: MaxSurface "Maximum electric field in gas" on selection gasdom | data = dset1; expr = es.normE; unit = kV/mm
  glob1: EvalGlobal "Floating intermediate-electrode potential" | data = dset1; expr = es.fp1.V0_ode; unit = kV

Plots
  pg1: PlotGroup2D "Electric Field Norm" | data = dset1
    surf1: Surface "表面 1" | expr = es.normE; unit = kV/mm