// COMSOL Multiphysics 6.2.0.290 model "rounded_R2_L03.mph"
// Outline of the model tree

Parameters
  Un = 500[kV]  // Nominal system voltage
  Uhv = Un/sqrt(3)*sqrt(2)  // Phase-to-ground peak voltage
  r_hv = 70[mm]  // Equivalent outer radius of HV electrode
  d = 120[mm]  // Main insulation radial gap
  H = 500[mm]  // Axial model height
  r_m = 120[mm]  // Intermediate-electrode inner radius
  t_m = 4[mm]  // Intermediate-electrode radial thickness
  l_m = 60[mm]  // Intermediate-electrode axial length
  h_m = 0.52  // Normalized intermediate-electrode center position
  z_m = h_m*H-l_m/2  // Intermediate-electrode lower axial position
  epsr_gas = 1.0006  // Representative relative permittivity of N2/O2/He gas

Selections
  gasdom: Explicit "Gas domain" on domains 1
  hv: Explicit "High-voltage electrode surface" on boundaries 1
  gnd: Explicit "Grounded enclosure inner wall" on boundaries 6
  floating: Explicit "Floating intermediate electrode surface" on boundaries 4, 5, 7-10
  newgas: Box "框" | entitydim = 2; xmin = 71; xmax = 72; ymin = 249; ymax = 251
  newhv: Box "框 2" | entitydim = 1; xmin = 69.999; xmax = 70.001; ymin = -0.001; ymax = 500.001; condition = inside
  newground: Box "框 3" | entitydim = 1; xmin = 189.999; xmax = 190.001; ymin = -0.001; ymax = 500.001; condition = inside
  newfloat: Box "框 4" | entitydim = 1; xmin = 119.999; xmax = 124.001; ymin = 229.999; ymax = 290.001; condition = inside
  endlo: Box "框 5" | entitydim = 1; xmin = 119.999; xmax = 124.001; ymin = 229.999; ymax = 232.001; condition = inside
  endhi: Box "框 6" | entitydim = 1; xmin = 119.999; xmax = 124.001; ymin = 287.999; ymax = 290.001; condition = inside
  ends: Explicit "显式" on boundaries 7-10

Geometry
  geom1 "几何 1" (2D axisymmetric, length unit mm)
    gas: Rectangle "Gas chamber cross-section" | pos = {r_hv, 0}; size = {d, H}
    ie: Rectangle "Intermediate electrode cross-section" | pos = {120, 232}; size = {4, 56}
    cap0: Circle "圆" | pos = {122, 232}; r = 2
    cap1: Circle "圆 1" | pos = {122, 288}; r = 2
    capsule: Union "并集" | input = ie, cap0, cap1; intbnd = off; edge = all
    fin: Finalize "形成联合体"

Materials
  mat1: Common "N2 O2 He representative dielectric" on selection gasdom
    def "基本"
      relpermittivity = epsr_gas

Physics
  es: Electrostatics on selection gasdom
    dependent variable V
    ccn1: ChargeConservation "电荷守恒 1" (default)
    axi1: AxialSymmetry "轴对称 1" (default)
    zc1: ZeroCharge "零电荷 1" (default)
    init1: init "初始值 1" (default)
    pot1: ElectricPotential "408.248 kV phase-to-ground peak" on selection hv | V0 = Uhv
    gnd1: Ground "接地 1" on selection gnd
    fp1: FloatingPotential "Zero-net-charge floating electrode" on selection floating | Q0 = 0[C]

Mesh
  mesh1 "网格 1"
    size: MeshSizeDefault "大小" | hmax = 4; hmin = 0.0125; hgrad = 1.2; custom = on
    hvsize: Size "大小 2" on selection hv | hmin = 0.0125; hgrad = 1.2; custom = on; hmax = 1
    floatsize: Size "大小 3" on selection floating | hmax = 0.5; hmin = 0.0125; hgrad = 1.2; custom = on
    endsize: Size "大小 4" on selection ends | hmax = 0.05; hmin = 0.0125; hgrad = 1.2; custom = on
    ftri: FreeTri "自由三角形网格" on selection gasdom

Studies
  std1 "Stationary Electrostatics"
    stat: Stationary "稳态"

Solver configurations
  sol1 "解 1" (study std1)
    v1: Variables "因变量 1"
    s1: Stationary "稳态求解器 1"
      dDef: Direct "直接"
      fc1: FullyCoupled "全耦合 1"

Datasets
  dset1: Solution | solution = sol1

Derived values
  max1: MaxSurface "Maximum electric field in gas" on selection gasdom | data = dset1; expr = es.normE; unit = kV/mm
  glob1: EvalGlobal "Floating intermediate-electrode potential" | data = dset1; expr = es.fp1.V0_ode; unit = kV
  localcloud: Eval "计算" on selection gasdom
    data = dset1
    expr = {es.normE/(1[kV/mm]), r/(1[mm]), z/(1[mm]), V/(1[kV])}
    unit = {1, 1, 1, 1}
  localglobal: EvalGlobal "全局计算" | data = dset1; expr = es.fp1.V0_ode/(1[kV])
  anchors: Interp "插值" on domains 1
    data = dset1
    expr = {es.normE/(1[kV/mm]), r/(1[mm]), z/(1[mm]), V/(1[kV])}
    unit = {1, 1, 1, 1}
    ext = 0
    coorderr = off
  hp0: Interp "插值 2" on domains 1
    data = dset1
    expr = {es.normE/(1[kV/mm]), r/(1[mm]), z/(1[mm]), V/(1[kV])}
    unit = {1, 1, 1, 1}
    ext = 0
    coorderr = off
  hp1: Interp "插值 1" on domains 1
    data = dset1
    expr = {es.normE/(1[kV/mm]), r/(1[mm]), z/(1[mm]), V/(1[kV])}
    unit = {1, 1, 1, 1}
    ext = 0
    coorderr = off
  rays: Interp "插值 3" on domains 1
    data = dset1
    expr = {es.normE/(1[kV/mm]), r/(1[mm]), z/(1[mm]), V/(1[kV])}
    unit = {1, 1, 1, 1}
    ext = 0
    coorderr = off
  endprofile: Interp "插值 4" on domains 1
    data = dset1
    expr = {es.normE/(1[kV/mm]), r/(1[mm]), z/(1[mm]), V/(1[kV])}
    unit = {1, 1, 1, 1}
    ext = 0
    coorderr = off

Plots
  pg1: PlotGroup2D "Electric Field Norm" | data = dset1
    surf1: Surface "表面 1" | expr = es.normE; unit = kV/mm